OpenVSP model (file version 5), 69 components.
Geometry view with OpenVSP parameter names; values to 6 digits, angles in degrees, lengths in the model's unit.
Overall bounding box: X_Min=0 X_Len=120 Y_Min=-8.37838 Y_Len=16.7568 Z_Min=-5.49593 Z_Len=10.9919

Fuselage "SuperHeavy Fuse"
  location (X Y Z) 50 0 0, rotation 0 0 0
  bounding box size 70 9 9
  Design: Length=70
  cross sections:
    n  XLocPercent  YLocPercent  ZLocPercent  shape
    0  0            0            0            circle Circle_Diameter=9
    1  1            0            0            as above

Blank "GridFins_Assy", child of "SuperHeavy Fuse"
  location (X Y Z) 50 0 0, rotation 30 0 0; relative location 0 0 0, rotation 30 0 0

Blank "Grid Fin", child of "GridFins_Assy"
  location (X Y Z) 52 3.89711 2.25, rotation 30 0 0; relative location 2 4.5 0, rotation 0 0 0

Wing "Long Walls", child of "Grid Fin"
  location (X Y Z) 52 3.33461 3.22428, rotation 30 0 0; relative location 0 0 1.125, rotation 0 0 0
  symmetric about XY
  bounding box size 0.25 5.04711 4.24186
  totals: TotalSpan=9 TotalProjectedSpan=9 TotalChord=0.25 TotalArea=2.25 TotalAR=36
  root: chord 0.25, twist 0, rounded rectangle RoundRectXSec_Radius=0.025 RoundedRect_Height=0.05 RoundedRect_Width=0.25
  sections:
    n  Span  Root_Chord  Tip_Chord  Area   Sweep  Sweep_Location  Dihedral  Twist  Twist_Location  tip airfoil
    1  4.5   0.25        0.25       1.125  0      0               0         0      0.25            rounded rectangle RoundRectXSec_Radius=0.0133949 RoundedRect_Height=0.05 RoundedRect_Width=0.25

Wing "Short Walls", child of "Grid Fin"
  location (X Y Z) 52 4.45961 1.27572, rotation 120 0 0; relative location 0 0 -1.125, rotation 90 0 0
  bounding box size 0.25 1.1683 1.97356
  totals: TotalSpan=2.25 TotalProjectedSpan=2.25 TotalChord=0.25 TotalArea=0.5625 TotalAR=9
  root: chord 0.25, twist 0, rounded rectangle RoundRectXSec_Radius=0.025 RoundedRect_Height=0.05 RoundedRect_Width=0.25
  sections:
    n  Span  Root_Chord  Tip_Chord  Area    Sweep  Sweep_Location  Dihedral  Twist  Twist_Location  tip airfoil
    1  2.25  0.25        0.25       0.5625  0      0               0         0      0.25            rounded rectangle RoundRectXSec_Radius=0.0133949 RoundedRect_Height=0.05 RoundedRect_Width=0.25

Wing "Short Walls", child of "Grid Fin"
  location (X Y Z) 52 8.35673 3.52572, rotation 120 0 0; relative location 0 4.5 -1.125, rotation 90 0 0
  bounding box size 0.25 1.1683 1.97356
  totals: TotalSpan=2.25 TotalProjectedSpan=2.25 TotalChord=0.25 TotalArea=0.5625 TotalAR=9
  root: chord 0.25, twist 0, rounded rectangle RoundRectXSec_Radius=0.025 RoundedRect_Height=0.05 RoundedRect_Width=0.25
  sections:
    n  Span  Root_Chord  Tip_Chord  Area    Sweep  Sweep_Location  Dihedral  Twist  Twist_Location  tip airfoil
    1  2.25  0.25        0.25       0.5625  0      0               0         0      0.25            rounded rectangle RoundRectXSec_Radius=0.0133949 RoundedRect_Height=0.05 RoundedRect_Width=0.25

Wing "Angle0", child of "Grid Fin"
  location (X Y Z) 52 3.89711 2.25, rotation 75 0 0; relative location 0 0 0, rotation 45 0 0
  bounding box size 0.25 0.460075 1.54972
  totals: TotalSpan=1.59099 TotalProjectedSpan=1.59099 TotalChord=0.25 TotalArea=0.397748 TotalAR=6.36396
  root: chord 0.25, twist 0, rounded rectangle RoundRectXSec_Radius=0.025 RoundedRect_Height=0.05 RoundedRect_Width=0.25
  sections:
    n  Span     Root_Chord  Tip_Chord  Area      Sweep  Sweep_Location  Dihedral  Twist  Twist_Location  tip airfoil
    1  1.59099  0.25        0.25       0.397748  0      0               0         0      0.25            rounded rectangle RoundRectXSec_Radius=0.0133949 RoundedRect_Height=0.05 RoundedRect_Width=0.25

Wing "Angle1", child of "Grid Fin"
  location (X Y Z) 52 4.45961 1.27572, rotation 75 0 0; relative location 0 0 -1.125, rotation 45 0 0
  bounding box size 0.25 0.871854 3.0865
  totals: TotalSpan=3.18198 TotalProjectedSpan=3.18198 TotalChord=0.25 TotalArea=0.795496 TotalAR=12.7279
  root: chord 0.25, twist 0, rounded rectangle RoundRectXSec_Radius=0.025 RoundedRect_Height=0.05 RoundedRect_Width=0.25
  sections:
    n  Span     Root_Chord  Tip_Chord  Area      Sweep  Sweep_Location  Dihedral  Twist  Twist_Location  tip airfoil
    1  3.18198  0.25        0.25       0.795496  0      0               0         0      0.25            rounded rectangle RoundRectXSec_Radius=0.0133949 RoundedRect_Height=0.05 RoundedRect_Width=0.25

Wing "Angle4", child of "Grid Fin"
  location (X Y Z) 52 6.40817 2.40072, rotation 75 0 0; relative location 0 2.25 -1.125, rotation 45 0 0
  bounding box size 0.25 0.871854 3.0865
  totals: TotalSpan=3.18198 TotalProjectedSpan=3.18198 TotalChord=0.25 TotalArea=0.795496 TotalAR=12.7279
  root: chord 0.25, twist 0, rounded rectangle RoundRectXSec_Radius=0.025 RoundedRect_Height=0.05 RoundedRect_Width=0.25
  sections:
    n  Span     Root_Chord  Tip_Chord  Area      Sweep  Sweep_Location  Dihedral  Twist  Twist_Location  tip airfoil
    1  3.18198  0.25        0.25       0.795496  0      0               0         0      0.25            rounded rectangle RoundRectXSec_Radius=0.0133949 RoundedRect_Height=0.05 RoundedRect_Width=0.25

Wing "Angle6", child of "Grid Fin"
  location (X Y Z) 52 7.38245 2.96322, rotation 75 0 0; relative location 0 3.375 -1.125, rotation 45 0 0
  bounding box size 0.25 0.460075 1.54972
  totals: TotalSpan=1.59099 TotalProjectedSpan=1.59099 TotalChord=0.25 TotalArea=0.397748 TotalAR=6.36396
  root: chord 0.25, twist 0, rounded rectangle RoundRectXSec_Radius=0.025 RoundedRect_Height=0.05 RoundedRect_Width=0.25
  sections:
    n  Span     Root_Chord  Tip_Chord  Area      Sweep  Sweep_Location  Dihedral  Twist  Twist_Location  tip airfoil
    1  1.59099  0.25        0.25       0.397748  0      0               0         0      0.25            rounded rectangle RoundRectXSec_Radius=0.0133949 RoundedRect_Height=0.05 RoundedRect_Width=0.25

Wing "Angle8", child of "Grid Fin"
  location (X Y Z) 52 3.33461 3.22428, rotation -15 0 0; relative location 0 0 1.125, rotation -45 0 0
  bounding box size 0.25 3.0865 0.871854
  totals: TotalSpan=3.18198 TotalProjectedSpan=3.18198 TotalChord=0.25 TotalArea=0.795496 TotalAR=12.7279
  root: chord 0.25, twist 0, rounded rectangle RoundRectXSec_Radius=0.025 RoundedRect_Height=0.05 RoundedRect_Width=0.25
  sections:
    n  Span     Root_Chord  Tip_Chord  Area      Sweep  Sweep_Location  Dihedral  Twist  Twist_Location  tip airfoil
    1  3.18198  0.25        0.25       0.795496  0      0               0         0      0.25            rounded rectangle RoundRectXSec_Radius=0.0133949 RoundedRect_Height=0.05 RoundedRect_Width=0.25

Wing "Angle9", child of "Grid Fin"
  location (X Y Z) 52 4.34108 3.80536, rotation -15 0 0; relative location 0 1.16216 1.125, rotation -45 0 0
  bounding box size 0.25 3.0865 0.871854
  totals: TotalSpan=3.18198 TotalProjectedSpan=3.18198 TotalChord=0.25 TotalArea=0.795496 TotalAR=12.7279
  root: chord 0.25, twist 0, rounded rectangle RoundRectXSec_Radius=0.025 RoundedRect_Height=0.05 RoundedRect_Width=0.25
  sections:
    n  Span     Root_Chord  Tip_Chord  Area      Sweep  Sweep_Location  Dihedral  Twist  Twist_Location  tip airfoil
    1  3.18198  0.25        0.25       0.795496  0      0               0         0      0.25            rounded rectangle RoundRectXSec_Radius=0.0133949 RoundedRect_Height=0.05 RoundedRect_Width=0.25

Wing "Angle11", child of "Grid Fin"
  location (X Y Z) 52 5.28317 4.34928, rotation -15 0 0; relative location 0 2.25 1.125, rotation -45 0 0
  bounding box size 0.25 3.0865 0.871854
  totals: TotalSpan=3.18198 TotalProjectedSpan=3.18198 TotalChord=0.25 TotalArea=0.795496 TotalAR=12.7279
  root: chord 0.25, twist 0, rounded rectangle RoundRectXSec_Radius=0.025 RoundedRect_Height=0.05 RoundedRect_Width=0.25
  sections:
    n  Span     Root_Chord  Tip_Chord  Area      Sweep  Sweep_Location  Dihedral  Twist  Twist_Location  tip airfoil
    1  3.18198  0.25        0.25       0.795496  0      0               0         0      0.25            rounded rectangle RoundRectXSec_Radius=0.0133949 RoundedRect_Height=0.05 RoundedRect_Width=0.25

Wing "Angle10", child of "Grid Fin"
  location (X Y Z) 52 5.46608 1.8568, rotation 75 0 0; relative location 0 1.16216 -1.125, rotation 45 0 0
  bounding box size 0.25 0.871854 3.0865
  totals: TotalSpan=3.18198 TotalProjectedSpan=3.18198 TotalChord=0.25 TotalArea=0.795496 TotalAR=12.7279
  root: chord 0.25, twist 0, rounded rectangle RoundRectXSec_Radius=0.025 RoundedRect_Height=0.05 RoundedRect_Width=0.25
  sections:
    n  Span     Root_Chord  Tip_Chord  Area      Sweep  Sweep_Location  Dihedral  Twist  Twist_Location  tip airfoil
    1  3.18198  0.25        0.25       0.795496  0      0               0         0      0.25            rounded rectangle RoundRectXSec_Radius=0.0133949 RoundedRect_Height=0.05 RoundedRect_Width=0.25

Wing "Angle12", child of "Grid Fin"
  location (X Y Z) 52 3.89711 2.25, rotation -15 0 0; relative location 0 0 0, rotation -45 0 0
  bounding box size 0.25 1.54972 0.460075
  totals: TotalSpan=1.59099 TotalProjectedSpan=1.59099 TotalChord=0.25 TotalArea=0.397748 TotalAR=6.36396
  root: chord 0.25, twist 0, rounded rectangle RoundRectXSec_Radius=0.025 RoundedRect_Height=0.05 RoundedRect_Width=0.25
  sections:
    n  Span     Root_Chord  Tip_Chord  Area      Sweep  Sweep_Location  Dihedral  Twist  Twist_Location  tip airfoil
    1  1.59099  0.25        0.25       0.397748  0      0               0         0      0.25            rounded rectangle RoundRectXSec_Radius=0.0133949 RoundedRect_Height=0.05 RoundedRect_Width=0.25

Wing "Angle13", child of "Grid Fin"
  location (X Y Z) 52 6.25745 4.91178, rotation -15 0 0; relative location 0 3.375 1.125, rotation -45 0 0
  bounding box size 0.25 1.54972 0.460075
  totals: TotalSpan=1.59099 TotalProjectedSpan=1.59099 TotalChord=0.25 TotalArea=0.397748 TotalAR=6.36396
  root: chord 0.25, twist 0, rounded rectangle RoundRectXSec_Radius=0.025 RoundedRect_Height=0.05 RoundedRect_Width=0.25
  sections:
    n  Span     Root_Chord  Tip_Chord  Area      Sweep  Sweep_Location  Dihedral  Twist  Twist_Location  tip airfoil
    1  1.59099  0.25        0.25       0.397748  0      0               0         0      0.25            rounded rectangle RoundRectXSec_Radius=0.0133949 RoundedRect_Height=0.05 RoundedRect_Width=0.25

Blank "GridFins_Assy", child of "SuperHeavy Fuse"
  location (X Y Z) 50 0 0, rotation -30 0 0; relative location 0 0 0, rotation -30 0 0

Blank "Grid Fin", child of "GridFins_Assy"
  location (X Y Z) 52 3.89711 -2.25, rotation -30 0 0; relative location 2 4.5 0, rotation 0 0 0

Wing "Long Walls", child of "Grid Fin"
  location (X Y Z) 52 4.45961 -1.27572, rotation -30 0 0; relative location 0 0 1.125, rotation 0 0 0
  symmetric about XY
  bounding box size 0.25 5.04711 4.24186
  totals: TotalSpan=9 TotalProjectedSpan=9 TotalChord=0.25 TotalArea=2.25 TotalAR=36
  root: chord 0.25, twist 0, rounded rectangle RoundRectXSec_Radius=0.025 RoundedRect_Height=0.05 RoundedRect_Width=0.25
  sections:
    n  Span  Root_Chord  Tip_Chord  Area   Sweep  Sweep_Location  Dihedral  Twist  Twist_Location  tip airfoil
    1  4.5   0.25        0.25       1.125  0      0               0         0      0.25            rounded rectangle RoundRectXSec_Radius=0.0133949 RoundedRect_Height=0.05 RoundedRect_Width=0.25

Wing "Short Walls", child of "Grid Fin"
  location (X Y Z) 52 3.33461 -3.22428, rotation 60 0 0; relative location 0 0 -1.125, rotation 90 0 0
  bounding box size 0.25 1.1683 1.97356
  totals: TotalSpan=2.25 TotalProjectedSpan=2.25 TotalChord=0.25 TotalArea=0.5625 TotalAR=9
  root: chord 0.25, twist 0, rounded rectangle RoundRectXSec_Radius=0.025 RoundedRect_Height=0.05 RoundedRect_Width=0.25
  sections:
    n  Span  Root_Chord  Tip_Chord  Area    Sweep  Sweep_Location  Dihedral  Twist  Twist_Location  tip airfoil
    1  2.25  0.25        0.25       0.5625  0      0               0         0      0.25            rounded rectangle RoundRectXSec_Radius=0.0133949 RoundedRect_Height=0.05 RoundedRect_Width=0.25

Wing "Short Walls", child of "Grid Fin"
  location (X Y Z) 52 7.23173 -5.47428, rotation 60 0 0; relative location 0 4.5 -1.125, rotation 90 0 0
  bounding box size 0.25 1.1683 1.97356
  totals: TotalSpan=2.25 TotalProjectedSpan=2.25 TotalChord=0.25 TotalArea=0.5625 TotalAR=9
  root: chord 0.25, twist 0, rounded rectangle RoundRectXSec_Radius=0.025 RoundedRect_Height=0.05 RoundedRect_Width=0.25
  sections:
    n  Span  Root_Chord  Tip_Chord  Area    Sweep  Sweep_Location  Dihedral  Twist  Twist_Location  tip airfoil
    1  2.25  0.25        0.25       0.5625  0      0               0         0      0.25            rounded rectangle RoundRectXSec_Radius=0.0133949 RoundedRect_Height=0.05 RoundedRect_Width=0.25

Wing "Angle0", child of "Grid Fin"
  location (X Y Z) 52 3.89711 -2.25, rotation 15 0 0; relative location 0 0 0, rotation 45 0 0
  bounding box size 0.25 1.54972 0.460075
  totals: TotalSpan=1.59099 TotalProjectedSpan=1.59099 TotalChord=0.25 TotalArea=0.397748 TotalAR=6.36396
  root: chord 0.25, twist 0, rounded rectangle RoundRectXSec_Radius=0.025 RoundedRect_Height=0.05 RoundedRect_Width=0.25
  sections:
    n  Span     Root_Chord  Tip_Chord  Area      Sweep  Sweep_Location  Dihedral  Twist  Twist_Location  tip airfoil
    1  1.59099  0.25        0.25       0.397748  0      0               0         0      0.25            rounded rectangle RoundRectXSec_Radius=0.0133949 RoundedRect_Height=0.05 RoundedRect_Width=0.25

Wing "Angle1", child of "Grid Fin"
  location (X Y Z) 52 3.33461 -3.22428, rotation 15 0 0; relative location 0 0 -1.125, rotation 45 0 0
  bounding box size 0.25 3.0865 0.871854
  totals: TotalSpan=3.18198 TotalProjectedSpan=3.18198 TotalChord=0.25 TotalArea=0.795496 TotalAR=12.7279
  root: chord 0.25, twist 0, rounded rectangle RoundRectXSec_Radius=0.025 RoundedRect_Height=0.05 RoundedRect_Width=0.25
  sections:
    n  Span     Root_Chord  Tip_Chord  Area      Sweep  Sweep_Location  Dihedral  Twist  Twist_Location  tip airfoil
    1  3.18198  0.25        0.25       0.795496  0      0               0         0      0.25            rounded rectangle RoundRectXSec_Radius=0.0133949 RoundedRect_Height=0.05 RoundedRect_Width=0.25

Wing "Angle4", child of "Grid Fin"
  location (X Y Z) 52 5.28317 -4.34928, rotation 15 0 0; relative location 0 2.25 -1.125, rotation 45 0 0
  bounding box size 0.25 3.0865 0.871854
  totals: TotalSpan=3.18198 TotalProjectedSpan=3.18198 TotalChord=0.25 TotalArea=0.795496 TotalAR=12.7279
  root: chord 0.25, twist 0, rounded rectangle RoundRectXSec_Radius=0.025 RoundedRect_Height=0.05 RoundedRect_Width=0.25
  sections:
    n  Span     Root_Chord  Tip_Chord  Area      Sweep  Sweep_Location  Dihedral  Twist  Twist_Location  tip airfoil
    1  3.18198  0.25        0.25       0.795496  0      0               0         0      0.25            rounded rectangle RoundRectXSec_Radius=0.0133949 RoundedRect_Height=0.05 RoundedRect_Width=0.25

Wing "Angle6", child of "Grid Fin"
  location (X Y Z) 52 6.25745 -4.91178, rotation 15 0 0; relative location 0 3.375 -1.125, rotation 45 0 0
  bounding box size 0.25 1.54972 0.460075
  totals: TotalSpan=1.59099 TotalProjectedSpan=1.59099 TotalChord=0.25 TotalArea=0.397748 TotalAR=6.36396
  root: chord 0.25, twist 0, rounded rectangle RoundRectXSec_Radius=0.025 RoundedRect_Height=0.05 RoundedRect_Width=0.25
  sections:
    n  Span     Root_Chord  Tip_Chord  Area      Sweep  Sweep_Location  Dihedral  Twist  Twist_Location  tip airfoil
    1  1.59099  0.25        0.25       0.397748  0      0               0         0      0.25            rounded rectangle RoundRectXSec_Radius=0.0133949 RoundedRect_Height=0.05 RoundedRect_Width=0.25

Wing "Angle8", child of "Grid Fin"
  location (X Y Z) 52 4.45961 -1.27572, rotation -75 0 0; relative location 0 0 1.125, rotation -45 0 0
  bounding box size 0.25 0.871854 3.0865
  totals: TotalSpan=3.18198 TotalProjectedSpan=3.18198 TotalChord=0.25 TotalArea=0.795496 TotalAR=12.7279
  root: chord 0.25, twist 0, rounded rectangle RoundRectXSec_Radius=0.025 RoundedRect_Height=0.05 RoundedRect_Width=0.25
  sections:
    n  Span     Root_Chord  Tip_Chord  Area      Sweep  Sweep_Location  Dihedral  Twist  Twist_Location  tip airfoil
    1  3.18198  0.25        0.25       0.795496  0      0               0         0      0.25            rounded rectangle RoundRectXSec_Radius=0.0133949 RoundedRect_Height=0.05 RoundedRect_Width=0.25

Wing "Angle9", child of "Grid Fin"
  location (X Y Z) 52 5.46608 -1.8568, rotation -75 0 0; relative location 0 1.16216 1.125, rotation -45 0 0
  bounding box size 0.25 0.871854 3.0865
  totals: TotalSpan=3.18198 TotalProjectedSpan=3.18198 TotalChord=0.25 TotalArea=0.795496 TotalAR=12.7279
  root: chord 0.25, twist 0, rounded rectangle RoundRectXSec_Radius=0.025 RoundedRect_Height=0.05 RoundedRect_Width=0.25
  sections:
    n  Span     Root_Chord  Tip_Chord  Area      Sweep  Sweep_Location  Dihedral  Twist  Twist_Location  tip airfoil
    1  3.18198  0.25        0.25       0.795496  0      0               0         0      0.25            rounded rectangle RoundRectXSec_Radius=0.0133949 RoundedRect_Height=0.05 RoundedRect_Width=0.25

Wing "Angle11", child of "Grid Fin"
  location (X Y Z) 52 6.40817 -2.40072, rotation -75 0 0; relative location 0 2.25 1.125, rotation -45 0 0
  bounding box size 0.25 0.871854 3.0865
  totals: TotalSpan=3.18198 TotalProjectedSpan=3.18198 TotalChord=0.25 TotalArea=0.795496 TotalAR=12.7279
  root: chord 0.25, twist 0, rounded rectangle RoundRectXSec_Radius=0.025 RoundedRect_Height=0.05 RoundedRect_Width=0.25
  sections:
    n  Span     Root_Chord  Tip_Chord  Area      Sweep  Sweep_Location  Dihedral  Twist  Twist_Location  tip airfoil
    1  3.18198  0.25        0.25       0.795496  0      0               0         0      0.25            rounded rectangle RoundRectXSec_Radius=0.0133949 RoundedRect_Height=0.05 RoundedRect_Width=0.25

Wing "Angle10", child of "Grid Fin"
  location (X Y Z) 52 4.34108 -3.80536, rotation 15 0 0; relative location 0 1.16216 -1.125, rotation 45 0 0
  bounding box size 0.25 3.0865 0.871854
  totals: TotalSpan=3.18198 TotalProjectedSpan=3.18198 TotalChord=0.25 TotalArea=0.795496 TotalAR=12.7279
  root: chord 0.25, twist 0, rounded rectangle RoundRectXSec_Radius=0.025 RoundedRect_Height=0.05 RoundedRect_Width=0.25
  sections:
    n  Span     Root_Chord  Tip_Chord  Area      Sweep  Sweep_Location  Dihedral  Twist  Twist_Location  tip airfoil
    1  3.18198  0.25        0.25       0.795496  0      0               0         0      0.25            rounded rectangle RoundRectXSec_Radius=0.0133949 RoundedRect_Height=0.05 RoundedRect_Width=0.25

Wing "Angle12", child of "Grid Fin"
  location (X Y Z) 52 3.89711 -2.25, rotation -75 0 0; relative location 0 0 0, rotation -45 0 0
  bounding box size 0.25 0.460075 1.54972
  totals: TotalSpan=1.59099 TotalProjectedSpan=1.59099 TotalChord=0.25 TotalArea=0.397748 TotalAR=6.36396
  root: chord 0.25, twist 0, rounded rectangle RoundRectXSec_Radius=0.025 RoundedRect_Height=0.05 RoundedRect_Width=0.25
  sections:
    n  Span     Root_Chord  Tip_Chord  Area      Sweep  Sweep_Location  Dihedral  Twist  Twist_Location  tip airfoil
    1  1.59099  0.25        0.25       0.397748  0      0               0         0      0.25            rounded rectangle RoundRectXSec_Radius=0.0133949 RoundedRect_Height=0.05 RoundedRect_Width=0.25

Wing "Angle13", child of "Grid Fin"
  location (X Y Z) 52 7.38245 -2.96322, rotation -75 0 0; relative location 0 3.375 1.125, rotation -45 0 0
  bounding box size 0.25 0.460075 1.54972
  totals: TotalSpan=1.59099 TotalProjectedSpan=1.59099 TotalChord=0.25 TotalArea=0.397748 TotalAR=6.36396
  root: chord 0.25, twist 0, rounded rectangle RoundRectXSec_Radius=0.025 RoundedRect_Height=0.05 RoundedRect_Width=0.25
  sections:
    n  Span     Root_Chord  Tip_Chord  Area      Sweep  Sweep_Location  Dihedral  Twist  Twist_Location  tip airfoil
    1  1.59099  0.25        0.25       0.397748  0      0               0         0      0.25            rounded rectangle RoundRectXSec_Radius=0.0133949 RoundedRect_Height=0.05 RoundedRect_Width=0.25

Blank "GridFins_Assy", child of "SuperHeavy Fuse"
  location (X Y Z) 50 0 0, rotation 150 0 0; relative location 0 0 0, rotation 150 0 0

Blank "Grid Fin", child of "GridFins_Assy"
  location (X Y Z) 52 -3.89711 2.25, rotation 150 0 0; relative location 2 4.5 0, rotation 0 0 0

Wing "Long Walls", child of "Grid Fin"
  location (X Y Z) 52 -4.45961 1.27572, rotation 150 0 0; relative location 0 0 1.125, rotation 0 0 0
  symmetric about XY
  bounding box size 0.25 5.04711 4.24186
  totals: TotalSpan=9 TotalProjectedSpan=9 TotalChord=0.25 TotalArea=2.25 TotalAR=36
  root: chord 0.25, twist 0, rounded rectangle RoundRectXSec_Radius=0.025 RoundedRect_Height=0.05 RoundedRect_Width=0.25
  sections:
    n  Span  Root_Chord  Tip_Chord  Area   Sweep  Sweep_Location  Dihedral  Twist  Twist_Location  tip airfoil
    1  4.5   0.25        0.25       1.125  0      0               0         0      0.25            rounded rectangle RoundRectXSec_Radius=0.0133949 RoundedRect_Height=0.05 RoundedRect_Width=0.25

Wing "Short Walls", child of "Grid Fin"
  location (X Y Z) 52 -3.33461 3.22428, rotation -120 0 0; relative location 0 0 -1.125, rotation 90 0 0
  bounding box size 0.25 1.1683 1.97356
  totals: TotalSpan=2.25 TotalProjectedSpan=2.25 TotalChord=0.25 TotalArea=0.5625 TotalAR=9
  root: chord 0.25, twist 0, rounded rectangle RoundRectXSec_Radius=0.025 RoundedRect_Height=0.05 RoundedRect_Width=0.25
  sections:
    n  Span  Root_Chord  Tip_Chord  Area    Sweep  Sweep_Location  Dihedral  Twist  Twist_Location  tip airfoil
    1  2.25  0.25        0.25       0.5625  0      0               0         0      0.25            rounded rectangle RoundRectXSec_Radius=0.0133949 RoundedRect_Height=0.05 RoundedRect_Width=0.25

Wing "Short Walls", child of "Grid Fin"
  location (X Y Z) 52 -7.23173 5.47428, rotation -120 0 0; relative location 0 4.5 -1.125, rotation 90 0 0
  bounding box size 0.25 1.1683 1.97356
  totals: TotalSpan=2.25 TotalProjectedSpan=2.25 TotalChord=0.25 TotalArea=0.5625 TotalAR=9
  root: chord 0.25, twist 0, rounded rectangle RoundRectXSec_Radius=0.025 RoundedRect_Height=0.05 RoundedRect_Width=0.25
  sections:
    n  Span  Root_Chord  Tip_Chord  Area    Sweep  Sweep_Location  Dihedral  Twist  Twist_Location  tip airfoil
    1  2.25  0.25        0.25       0.5625  0      0               0         0      0.25            rounded rectangle RoundRectXSec_Radius=0.0133949 RoundedRect_Height=0.05 RoundedRect_Width=0.25

Wing "Angle0", child of "Grid Fin"
  location (X Y Z) 52 -3.89711 2.25, rotation -165 0 0; relative location 0 0 0, rotation 45 0 0
  bounding box size 0.25 1.54972 0.460075
  totals: TotalSpan=1.59099 TotalProjectedSpan=1.59099 TotalChord=0.25 TotalArea=0.397748 TotalAR=6.36396
  root: chord 0.25, twist 0, rounded rectangle RoundRectXSec_Radius=0.025 RoundedRect_Height=0.05 RoundedRect_Width=0.25
  sections:
    n  Span     Root_Chord  Tip_Chord  Area      Sweep  Sweep_Location  Dihedral  Twist  Twist_Location  tip airfoil
    1  1.59099  0.25        0.25       0.397748  0      0               0         0      0.25            rounded rectangle RoundRectXSec_Radius=0.0133949 RoundedRect_Height=0.05 RoundedRect_Width=0.25

Wing "Angle1", child of "Grid Fin"
  location (X Y Z) 52 -3.33461 3.22428, rotation -165 0 0; relative location 0 0 -1.125, rotation 45 0 0
  bounding box size 0.25 3.0865 0.871854
  totals: TotalSpan=3.18198 TotalProjectedSpan=3.18198 TotalChord=0.25 TotalArea=0.795496 TotalAR=12.7279
  root: chord 0.25, twist 0, rounded rectangle RoundRectXSec_Radius=0.025 RoundedRect_Height=0.05 RoundedRect_Width=0.25
  sections:
    n  Span     Root_Chord  Tip_Chord  Area      Sweep  Sweep_Location  Dihedral  Twist  Twist_Location  tip airfoil
    1  3.18198  0.25        0.25       0.795496  0      0               0         0      0.25            rounded rectangle RoundRectXSec_Radius=0.0133949 RoundedRect_Height=0.05 RoundedRect_Width=0.25

Wing "Angle4", child of "Grid Fin"
  location (X Y Z) 52 -5.28317 4.34928, rotation -165 0 0; relative location 0 2.25 -1.125, rotation 45 0 0
  bounding box size 0.25 3.0865 0.871854
  totals: TotalSpan=3.18198 TotalProjectedSpan=3.18198 TotalChord=0.25 TotalArea=0.795496 TotalAR=12.7279
  root: chord 0.25, twist 0, rounded rectangle RoundRectXSec_Radius=0.025 RoundedRect_Height=0.05 RoundedRect_Width=0.25
  sections:
    n  Span     Root_Chord  Tip_Chord  Area      Sweep  Sweep_Location  Dihedral  Twist  Twist_Location  tip airfoil
    1  3.18198  0.25        0.25       0.795496  0      0               0         0      0.25            rounded rectangle RoundRectXSec_Radius=0.0133949 RoundedRect_Height=0.05 RoundedRect_Width=0.25

Wing "Angle6", child of "Grid Fin"
  location (X Y Z) 52 -6.25745 4.91178, rotation -165 0 0; relative location 0 3.375 -1.125, rotation 45 0 0
  bounding box size 0.25 1.54972 0.460075
  totals: TotalSpan=1.59099 TotalProjectedSpan=1.59099 TotalChord=0.25 TotalArea=0.397748 TotalAR=6.36396
  root: chord 0.25, twist 0, rounded rectangle RoundRectXSec_Radius=0.025 RoundedRect_Height=0.05 RoundedRect_Width=0.25
  sections:
    n  Span     Root_Chord  Tip_Chord  Area      Sweep  Sweep_Location  Dihedral  Twist  Twist_Location  tip airfoil
    1  1.59099  0.25        0.25       0.397748  0      0               0         0      0.25            rounded rectangle RoundRectXSec_Radius=0.0133949 RoundedRect_Height=0.05 RoundedRect_Width=0.25

Wing "Angle8", child of "Grid Fin"
  location (X Y Z) 52 -4.45961 1.27572, rotation 105 0 0; relative location 0 0 1.125, rotation -45 0 0
  bounding box size 0.25 0.871854 3.0865
  totals: TotalSpan=3.18198 TotalProjectedSpan=3.18198 TotalChord=0.25 TotalArea=0.795496 TotalAR=12.7279
  root: chord 0.25, twist 0, rounded rectangle RoundRectXSec_Radius=0.025 RoundedRect_Height=0.05 RoundedRect_Width=0.25
  sections:
    n  Span     Root_Chord  Tip_Chord  Area      Sweep  Sweep_Location  Dihedral  Twist  Twist_Location  tip airfoil
    1  3.18198  0.25        0.25       0.795496  0      0               0         0      0.25            rounded rectangle RoundRectXSec_Radius=0.0133949 RoundedRect_Height=0.05 RoundedRect_Width=0.25

Wing "Angle9", child of "Grid Fin"
  location (X Y Z) 52 -5.46608 1.8568, rotation 105 0 0; relative location 0 1.16216 1.125, rotation -45 0 0
  bounding box size 0.25 0.871854 3.0865
  totals: TotalSpan=3.18198 TotalProjectedSpan=3.18198 TotalChord=0.25 TotalArea=0.795496 TotalAR=12.7279
  root: chord 0.25, twist 0, rounded rectangle RoundRectXSec_Radius=0.025 RoundedRect_Height=0.05 RoundedRect_Width=0.25
  sections:
    n  Span     Root_Chord  Tip_Chord  Area      Sweep  Sweep_Location  Dihedral  Twist  Twist_Location  tip airfoil
    1  3.18198  0.25        0.25       0.795496  0      0               0         0      0.25            rounded rectangle RoundRectXSec_Radius=0.0133949 RoundedRect_Height=0.05 RoundedRect_Width=0.25

Wing "Angle11", child of "Grid Fin"
  location (X Y Z) 52 -6.40817 2.40072, rotation 105 0 0; relative location 0 2.25 1.125, rotation -45 0 0
  bounding box size 0.25 0.871854 3.0865
  totals: TotalSpan=3.18198 TotalProjectedSpan=3.18198 TotalChord=0.25 TotalArea=0.795496 TotalAR=12.7279
  root: chord 0.25, twist 0, rounded rectangle RoundRectXSec_Radius=0.025 RoundedRect_Height=0.05 RoundedRect_Width=0.25
  sections:
    n  Span     Root_Chord  Tip_Chord  Area      Sweep  Sweep_Location  Dihedral  Twist  Twist_Location  tip airfoil
    1  3.18198  0.25        0.25       0.795496  0      0               0         0      0.25            rounded rectangle RoundRectXSec_Radius=0.0133949 RoundedRect_Height=0.05 RoundedRect_Width=0.25

Wing "Angle10", child of "Grid Fin"
  location (X Y Z) 52 -4.34108 3.80536, rotation -165 0 0; relative location 0 1.16216 -1.125, rotation 45 0 0
  bounding box size 0.25 3.0865 0.871854
  totals: TotalSpan=3.18198 TotalProjectedSpan=3.18198 TotalChord=0.25 TotalArea=0.795496 TotalAR=12.7279
  root: chord 0.25, twist 0, rounded rectangle RoundRectXSec_Radius=0.025 RoundedRect_Height=0.05 RoundedRect_Width=0.25
  sections:
    n  Span     Root_Chord  Tip_Chord  Area      Sweep  Sweep_Location  Dihedral  Twist  Twist_Location  tip airfoil
    1  3.18198  0.25        0.25       0.795496  0      0               0         0      0.25            rounded rectangle RoundRectXSec_Radius=0.0133949 RoundedRect_Height=0.05 RoundedRect_Width=0.25

Wing "Angle12", child of "Grid Fin"
  location (X Y Z) 52 -3.89711 2.25, rotation 105 0 0; relative location 0 0 0, rotation -45 0 0
  bounding box size 0.25 0.460075 1.54972
  totals: TotalSpan=1.59099 TotalProjectedSpan=1.59099 TotalChord=0.25 TotalArea=0.397748 TotalAR=6.36396
  root: chord 0.25, twist 0, rounded rectangle RoundRectXSec_Radius=0.025 RoundedRect_Height=0.05 RoundedRect_Width=0.25
  sections:
    n  Span     Root_Chord  Tip_Chord  Area      Sweep  Sweep_Location  Dihedral  Twist  Twist_Location  tip airfoil
    1  1.59099  0.25        0.25       0.397748  0      0               0         0      0.25            rounded rectangle RoundRectXSec_Radius=0.0133949 RoundedRect_Height=0.05 RoundedRect_Width=0.25

Wing "Angle13", child of "Grid Fin"
  location (X Y Z) 52 -7.38245 2.96322, rotation 105 0 0; relative location 0 3.375 1.125, rotation -45 0 0
  bounding box size 0.25 0.460075 1.54972
  totals: TotalSpan=1.59099 TotalProjectedSpan=1.59099 TotalChord=0.25 TotalArea=0.397748 TotalAR=6.36396
  root: chord 0.25, twist 0, rounded rectangle RoundRectXSec_Radius=0.025 RoundedRect_Height=0.05 RoundedRect_Width=0.25
  sections:
    n  Span     Root_Chord  Tip_Chord  Area      Sweep  Sweep_Location  Dihedral  Twist  Twist_Location  tip airfoil
    1  1.59099  0.25        0.25       0.397748  0      0               0         0      0.25            rounded rectangle RoundRectXSec_Radius=0.0133949 RoundedRect_Height=0.05 RoundedRect_Width=0.25

Blank "GridFins_Assy", child of "SuperHeavy Fuse"
  location (X Y Z) 50 0 0, rotation -150 0 0; relative location 0 0 0, rotation -150 0 0

Blank "Grid Fin", child of "GridFins_Assy"
  location (X Y Z) 52 -3.89711 -2.25, rotation -150 0 0; relative location 2 4.5 0, rotation 0 0 0

Wing "Long Walls", child of "Grid Fin"
  location (X Y Z) 52 -3.33461 -3.22428, rotation -150 0 0; relative location 0 0 1.125, rotation 0 0 0
  symmetric about XY
  bounding box size 0.25 5.04711 4.24186
  totals: TotalSpan=9 TotalProjectedSpan=9 TotalChord=0.25 TotalArea=2.25 TotalAR=36
  root: chord 0.25, twist 0, rounded rectangle RoundRectXSec_Radius=0.025 RoundedRect_Height=0.05 RoundedRect_Width=0.25
  sections:
    n  Span  Root_Chord  Tip_Chord  Area   Sweep  Sweep_Location  Dihedral  Twist  Twist_Location  tip airfoil
    1  4.5   0.25        0.25       1.125  0      0               0         0      0.25            rounded rectangle RoundRectXSec_Radius=0.0133949 RoundedRect_Height=0.05 RoundedRect_Width=0.25

Wing "Short Walls", child of "Grid Fin"
  location (X Y Z) 52 -4.45961 -1.27572, rotation -60 0 0; relative location 0 0 -1.125, rotation 90 0 0
  bounding box size 0.25 1.1683 1.97356
  totals: TotalSpan=2.25 TotalProjectedSpan=2.25 TotalChord=0.25 TotalArea=0.5625 TotalAR=9
  root: chord 0.25, twist 0, rounded rectangle RoundRectXSec_Radius=0.025 RoundedRect_Height=0.05 RoundedRect_Width=0.25
  sections:
    n  Span  Root_Chord  Tip_Chord  Area    Sweep  Sweep_Location  Dihedral  Twist  Twist_Location  tip airfoil
    1  2.25  0.25        0.25       0.5625  0      0               0         0      0.25            rounded rectangle RoundRectXSec_Radius=0.0133949 RoundedRect_Height=0.05 RoundedRect_Width=0.25

Wing "Short Walls", child of "Grid Fin"
  location (X Y Z) 52 -8.35673 -3.52572, rotation -60 0 0; relative location 0 4.5 -1.125, rotation 90 0 0
  bounding box size 0.25 1.1683 1.97356
  totals: TotalSpan=2.25 TotalProjectedSpan=2.25 TotalChord=0.25 TotalArea=0.5625 TotalAR=9
  root: chord 0.25, twist 0, rounded rectangle RoundRectXSec_Radius=0.025 RoundedRect_Height=0.05 RoundedRect_Width=0.25
  sections:
    n  Span  Root_Chord  Tip_Chord  Area    Sweep  Sweep_Location  Dihedral  Twist  Twist_Location  tip airfoil
    1  2.25  0.25        0.25       0.5625  0      0               0         0      0.25            rounded rectangle RoundRectXSec_Radius=0.0133949 RoundedRect_Height=0.05 RoundedRect_Width=0.25

Wing "Angle0", child of "Grid Fin"
  location (X Y Z) 52 -3.89711 -2.25, rotation -105 0 0; relative location 0 0 0, rotation 45 0 0
  bounding box size 0.25 0.460075 1.54972
  totals: TotalSpan=1.59099 TotalProjectedSpan=1.59099 TotalChord=0.25 TotalArea=0.397748 TotalAR=6.36396
  root: chord 0.25, twist 0, rounded rectangle RoundRectXSec_Radius=0.025 RoundedRect_Height=0.05 RoundedRect_Width=0.25
  sections:
    n  Span     Root_Chord  Tip_Chord  Area      Sweep  Sweep_Location  Dihedral  Twist  Twist_Location  tip airfoil
    1  1.59099  0.25        0.25       0.397748  0      0               0         0      0.25            rounded rectangle RoundRectXSec_Radius=0.0133949 RoundedRect_Height=0.05 RoundedRect_Width=0.25

Wing "Angle1", child of "Grid Fin"
  location (X Y Z) 52 -4.45961 -1.27572, rotation -105 0 0; relative location 0 0 -1.125, rotation 45 0 0
  bounding box size 0.25 0.871854 3.0865
  totals: TotalSpan=3.18198 TotalProjectedSpan=3.18198 TotalChord=0.25 TotalArea=0.795496 TotalAR=12.7279
  root: chord 0.25, twist 0, rounded rectangle RoundRectXSec_Radius=0.025 RoundedRect_Height=0.05 RoundedRect_Width=0.25
  sections:
    n  Span     Root_Chord  Tip_Chord  Area      Sweep  Sweep_Location  Dihedral  Twist  Twist_Location  tip airfoil
    1  3.18198  0.25        0.25       0.795496  0      0               0         0      0.25            rounded rectangle RoundRectXSec_Radius=0.0133949 RoundedRect_Height=0.05 RoundedRect_Width=0.25

Wing "Angle4", child of "Grid Fin"
  location (X Y Z) 52 -6.40817 -2.40072, rotation -105 0 0; relative location 0 2.25 -1.125, rotation 45 0 0
  bounding box size 0.25 0.871854 3.0865
  totals: TotalSpan=3.18198 TotalProjectedSpan=3.18198 TotalChord=0.25 TotalArea=0.795496 TotalAR=12.7279
  root: chord 0.25, twist 0, rounded rectangle RoundRectXSec_Radius=0.025 RoundedRect_Height=0.05 RoundedRect_Width=0.25
  sections:
    n  Span     Root_Chord  Tip_Chord  Area      Sweep  Sweep_Location  Dihedral  Twist  Twist_Location  tip airfoil
    1  3.18198  0.25        0.25       0.795496  0      0               0         0      0.25            rounded rectangle RoundRectXSec_Radius=0.0133949 RoundedRect_Height=0.05 RoundedRect_Width=0.25

Wing "Angle6", child of "Grid Fin"
  location (X Y Z) 52 -7.38245 -2.96322, rotation -105 0 0; relative location 0 3.375 -1.125, rotation 45 0 0
  bounding box size 0.25 0.460075 1.54972
  totals: TotalSpan=1.59099 TotalProjectedSpan=1.59099 TotalChord=0.25 TotalArea=0.397748 TotalAR=6.36396
  root: chord 0.25, twist 0, rounded rectangle RoundRectXSec_Radius=0.025 RoundedRect_Height=0.05 RoundedRect_Width=0.25
  sections:
    n  Span     Root_Chord  Tip_Chord  Area      Sweep  Sweep_Location  Dihedral  Twist  Twist_Location  tip airfoil
    1  1.59099  0.25        0.25       0.397748  0      0               0         0      0.25            rounded rectangle RoundRectXSec_Radius=0.0133949 RoundedRect_Height=0.05 RoundedRect_Width=0.25

Wing "Angle8", child of "Grid Fin"
  location (X Y Z) 52 -3.33461 -3.22428, rotation 165 0 0; relative location 0 0 1.125, rotation -45 0 0
  bounding box size 0.25 3.0865 0.871854
  totals: TotalSpan=3.18198 TotalProjectedSpan=3.18198 TotalChord=0.25 TotalArea=0.795496 TotalAR=12.7279
  root: chord 0.25, twist 0, rounded rectangle RoundRectXSec_Radius=0.025 RoundedRect_Height=0.05 RoundedRect_Width=0.25
  sections:
    n  Span     Root_Chord  Tip_Chord  Area      Sweep  Sweep_Location  Dihedral  Twist  Twist_Location  tip airfoil
    1  3.18198  0.25        0.25       0.795496  0      0               0         0      0.25            rounded rectangle RoundRectXSec_Radius=0.0133949 RoundedRect_Height=0.05 RoundedRect_Width=0.25

Wing "Angle9", child of "Grid Fin"
  location (X Y Z) 52 -4.34108 -3.80536, rotation 165 0 0; relative location 0 1.16216 1.125, rotation -45 0 0
  bounding box size 0.25 3.0865 0.871854
  totals: TotalSpan=3.18198 TotalProjectedSpan=3.18198 TotalChord=0.25 TotalArea=0.795496 TotalAR=12.7279
  root: chord 0.25, twist 0, rounded rectangle RoundRectXSec_Radius=0.025 RoundedRect_Height=0.05 RoundedRect_Width=0.25
  sections:
    n  Span     Root_Chord  Tip_Chord  Area      Sweep  Sweep_Location  Dihedral  Twist  Twist_Location  tip airfoil
    1  3.18198  0.25        0.25       0.795496  0      0               0         0      0.25            rounded rectangle RoundRectXSec_Radius=0.0133949 RoundedRect_Height=0.05 RoundedRect_Width=0.25

Wing "Angle11", child of "Grid Fin"
  location (X Y Z) 52 -5.28317 -4.34928, rotation 165 0 0; relative location 0 2.25 1.125, rotation -45 0 0
  bounding box size 0.25 3.0865 0.871854
  totals: TotalSpan=3.18198 TotalProjectedSpan=3.18198 TotalChord=0.25 TotalArea=0.795496 TotalAR=12.7279
  root: chord 0.25, twist 0, rounded rectangle RoundRectXSec_Radius=0.025 RoundedRect_Height=0.05 RoundedRect_Width=0.25
  sections:
    n  Span     Root_Chord  Tip_Chord  Area      Sweep  Sweep_Location  Dihedral  Twist  Twist_Location  tip airfoil
    1  3.18198  0.25        0.25       0.795496  0      0               0         0      0.25            rounded rectangle RoundRectXSec_Radius=0.0133949 RoundedRect_Height=0.05 RoundedRect_Width=0.25

Wing "Angle10", child of "Grid Fin"
  location (X Y Z) 52 -5.46608 -1.8568, rotation -105 0 0; relative location 0 1.16216 -1.125, rotation 45 0 0
  bounding box size 0.25 0.871854 3.0865
  totals: TotalSpan=3.18198 TotalProjectedSpan=3.18198 TotalChord=0.25 TotalArea=0.795496 TotalAR=12.7279
  root: chord 0.25, twist 0, rounded rectangle RoundRectXSec_Radius=0.025 RoundedRect_Height=0.05 RoundedRect_Width=0.25
  sections:
    n  Span     Root_Chord  Tip_Chord  Area      Sweep  Sweep_Location  Dihedral  Twist  Twist_Location  tip airfoil
    1  3.18198  0.25        0.25       0.795496  0      0               0         0      0.25            rounded rectangle RoundRectXSec_Radius=0.0133949 RoundedRect_Height=0.05 RoundedRect_Width=0.25

Wing "Angle12", child of "Grid Fin"
  location (X Y Z) 52 -3.89711 -2.25, rotation 165 0 0; relative location 0 0 0, rotation -45 0 0
  bounding box size 0.25 1.54972 0.460075
  totals: TotalSpan=1.59099 TotalProjectedSpan=1.59099 TotalChord=0.25 TotalArea=0.397748 TotalAR=6.36396
  root: chord 0.25, twist 0, rounded rectangle RoundRectXSec_Radius=0.025 RoundedRect_Height=0.05 RoundedRect_Width=0.25
  sections:
    n  Span     Root_Chord  Tip_Chord  Area      Sweep  Sweep_Location  Dihedral  Twist  Twist_Location  tip airfoil
    1  1.59099  0.25        0.25       0.397748  0      0               0         0      0.25            rounded rectangle RoundRectXSec_Radius=0.0133949 RoundedRect_Height=0.05 RoundedRect_Width=0.25

Wing "Angle13", child of "Grid Fin"
  location (X Y Z) 52 -6.25745 -4.91178, rotation 165 0 0; relative location 0 3.375 1.125, rotation -45 0 0
  bounding box size 0.25 1.54972 0.460075
  totals: TotalSpan=1.59099 TotalProjectedSpan=1.59099 TotalChord=0.25 TotalArea=0.397748 TotalAR=6.36396
  root: chord 0.25, twist 0, rounded rectangle RoundRectXSec_Radius=0.025 RoundedRect_Height=0.05 RoundedRect_Width=0.25
  sections:
    n  Span     Root_Chord  Tip_Chord  Area      Sweep  Sweep_Location  Dihedral  Twist  Twist_Location  tip airfoil
    1  1.59099  0.25        0.25       0.397748  0      0               0         0      0.25            rounded rectangle RoundRectXSec_Radius=0.0133949 RoundedRect_Height=0.05 RoundedRect_Width=0.25

Fuselage "Starship Fuse"
  location (X Y Z) 0 0 0, rotation 0 0 0
  bounding box size 50 9 9
  mass: Density=1 Shell_Flag=1 Mass_Area=1 Mass_Prior=1
  Design: Length=50
  cross sections:
    n  XLocPercent  YLocPercent  ZLocPercent  shape
    0  0            0            0            point
    1  0.25         0            0            circle Circle_Diameter=9
    2  0.35         0            0            as above
    3  0.6          0            0            as above
    4  0.787301     0            0            as above
    5  0.9          0            0            as above
    6  1            0            0            as above
  SS_Rectangle "PayloadBay_Door": Center_U=0.245 Center_W=0.75 U_Length=0.08 W_Length=0.08
  SS_Ellipse "Window": Center_U=0.17 Center_W=0.75 U_Length=0.03 W_Length=0.03
  SS_Ellipse "Window": Center_U=0.17 Center_W=0.8 U_Length=0.03 W_Length=0.03
  SS_Ellipse "Window": Center_U=0.17 Center_W=0.7 U_Length=0.03 W_Length=0.03
  structure "Fuselage_Struct0": Skin, ThrustPlate, LowerCH4, CommonBulkhead, UpperLox, CargoBulkhead, CraneBulkhead, SpinePlane

Fuselage "LOX_HeaderTank", child of "Starship Fuse"
  location (X Y Z) 1.65 0 0, rotation 0 0 0
  bounding box size 2.44576 3.84776 3.84776
  Design: Length=2.44576
  cross sections:
    n  XLocPercent  YLocPercent  ZLocPercent  shape
    0  0            0            0            circle Circle_Diameter=2.9
    1  1            0            0            point

Fuselage "CH4_Bulkhead", child of "Starship Fuse"
  location (X Y Z) 25.2 0 0, rotation 0 0 180
  bounding box size 3.5 9 9
  Design: Length=3.5
  cross sections:
    n  XLocPercent  YLocPercent  ZLocPercent  shape
    0  0            0            0            circle Circle_Diameter=9
    1  0.5          0            0            circle Circle_Diameter=7.34091
    2  0.899457     0            0            circle Circle_Diameter=3.31054
    3  1            0            0            point

Fuselage "CommonBulkhead", child of "Starship Fuse"
  location (X Y Z) 30.45 0 0, rotation 0 0 0
  bounding box size 3.5 9 9
  Design: Length=3.5
  cross sections:
    n  XLocPercent  YLocPercent  ZLocPercent  shape
    0  0            0            0            circle Circle_Diameter=9
    1  0.5          0            0            circle Circle_Diameter=7.34091
    2  0.899457     0            0            circle Circle_Diameter=3.31054
    3  1            0            0            point

Fuselage "CH4_HeaderTank", child of "Starship Fuse"
  location (X Y Z) 32.45 0 0, rotation 0 0 0
  bounding box size 3 4 4
  Design: Length=3
  cross sections:
    n  XLocPercent  YLocPercent  ZLocPercent  shape
    0  0            0            0            point
    1  1            0            0            point

Fuselage "ThrustBulkhead", child of "Starship Fuse"
  location (X Y Z) 43.2065 0 0, rotation 0 0 0
  bounding box size 3.5 9 9
  Design: Length=3.5
  cross sections:
    n  XLocPercent  YLocPercent  ZLocPercent  shape
    0  0            0            0            circle Circle_Diameter=9
    1  0.5          0            0            circle Circle_Diameter=7.34091
    2  0.899457     0            0            circle Circle_Diameter=3.31054
    3  1            0            0            point

Blank "Landing Gear Parent", child of "Starship Fuse"
  location (X Y Z) 45 0 0, rotation 0 0 0
  Mass: Point_Mass=100 Point_Mass_Flag=1

Fuselage "LandingGearPod", child of "Landing Gear Parent"
  location (X Y Z) 45 0 4.495, rotation 0 0 0; relative location 0 0 4.495, rotation 0 0 0
  6 copies around X
  bounding box size 5 9.00318 9.98886
  Design: Length=5
  cross sections:
    n  XLocPercent  YLocPercent  ZLocPercent  shape
    0  0            0            -0.011       wedge Chord=0.65 DuLow=0.1 DuUp=0.0590909 FlatLow=0.388636 FlatUp=0.388636 SymmThick=1 ThickChord=0 ThickLoc=0.3 ThickLocLow=0.3 UForeLow=0.25 UForeUp=0.775 ZCamber=0.05
    1  0.125        0            -0.0175      wedge Chord=1.25 DuLow=0.1 DuUp=0.0590909 FlatLow=0.56 FlatUp=0.56 SymmThick=1 ThickChord=0.295455 ThickLoc=0.2 ThickLocLow=0.2 UForeLow=0.25 UForeUp=0.775 ZCamber=0.177273
    2  0.423317     0            -0.025       wedge Chord=1.75 DuLow=0.1 DuUp=0.0590909 FlatLow=0.388636 FlatUp=0.388636 SymmThick=1 ThickChord=0.313636 ThickLoc=0.3 ThickLocLow=0.3 UForeLow=0.25 UForeUp=0.775 ZCamber=0.2
    3  0.95         0            -0.03        wedge Chord=2.25 DuLow=0.1 DuUp=0.0590909 FlatLow=0.362727 FlatUp=0.388636 SymmThick=0 ThickChord=0.227273 ThickLoc=0.3 ThickLocLow=0.286364 UForeLow=0.25 UForeUp=0.775 ZCamber=0.15
    4  1            0            -0.0295109   wedge Chord=1.10114 DuLow=0.1 DuUp=0.1 FlatLow=0.5 FlatUp=0.5 SymmThick=0 ThickChord=0.35 ThickLoc=0.25 ThickLocLow=0.25 UForeLow=0.25 UForeUp=0.75 ZCamber=0.213636

User parameters
  Default_Group:angle_span = 3.18198  (angle span)
  Default_Group:gridFin_a = 2.25  (Grid fin width)
  Default_Group:gridFin_b = 4.5  (Grid fin length)
  Default_Group:gridFin_theta = 45  (Grid fin angle)

Advanced link "angle_span_calc"
  input A = UserParm:Default_Group:gridFin_a
  input THETA = UserParm:Default_Group:gridFin_theta
  output H = UserParm:Default_Group:angle_span
    H = A/sin(THETA*3.14159/180);

VSPAERO settings: Sref=2.25 bref=9 cref=0.25 Xcg=50.125 Ycg=6.75562 Zcg=-0.00225076 AlphaStart=1 AlphaEnd=10 AlphaNpts=3 BetaStart=0 BetaEnd=0 BetaNpts=1 MachStart=0.3 MachEnd=0 MachNpts=1 ReCref=1e+07 Vinf=100 Rho=0.002377
